solve block
    # guess values
    a := 0
    b := 0
    g := 0
    j := 0
    p1 := 0.4
    c := 0
    f := 0
    k := 0
    p2 := 0.5
    d := 0
    h := 0
    l := 0
    e := 0
    i := 0
    m := 0
    # constraints
    a == 0
    b == 0
    c == p1*d + p1*(1 - p2)*g + (1 - p2)*e
    d == p1*c + p1*(1 - p2)*f
    e == (1 - p1)*c + (1 - p1)*(1 - p2)*f
    g == (1 - p2)*p1*i + p1*p2*f
    h == p2*(1 - p1)*f + (1 - p1)*(1 - p2)*i
    i == (1 - p1)*p2*g + (p1*p2 + (1 - p1)*(1 - p2) + p2*(1 - p1))*m + (1 - p2)*k + p2*h + (p1*p2 + (1 - p1)*(1 - p2))*j
    j == p1*p2*i + (1 - p2)*p1*l
    k == ((1 - p1)*(1 - p2) + p2*(1 - p1))*l + p2*(1 - p1)*i
    l == p2*(1 - p1)*j + p2*k + (p1*p2 + (1 - p1)*(1 - p2) + p2*(1 - p1))*m
    m == p1*p2*l
    a + b + c + d + e + f + g + h + i + j + k + l + m == 1
    # solver
    [a; b; c; d; e; f; g; h; i; j; k; l; m] := find(a, b, c, d, e, f, g, h, i, j, k, l, m) = [0; 0; 0.107283; 0.0817326; 0.122599; 0.194097; 0.0664534; 0.0996802; 0.138171; 0.039724; 0.0777209; 0.0604496; 0.0120899]
    Lоч := m*2 + l*2 + k*2 + j + i + h
    Lоч = 0.578096
    A := (1 - p2)*(m + l + k + j + i + h + g + f + e)
    A = 0.405492
    Pотк := 0.5*(1 - A/0.5)
    Pотк = 0.0945079
end solve block
