solve block
    # guess values
    a := 0
    d := 0
    g := 0
    μ := 0.5
    p := 0.4
    b := 0
    e := 0
    λ := 0.45
    c := 0
    f := 0
    # constraints
    (λ*p + (1 - p)*λ)*a == c*μ + b*μ
    (μ + λ*p + (1 - p)*λ)*b == μ*g + μ*d + λ*p*a
    (μ + p*λ + (1 - p)*λ)*c == μ*f + μ*e + (1 - p)*λ*a
    μ*d == λ*p*b + λ*p*e
    (p*λ + μ)*e == (1 - p)*λ*b
    μ*g == λ*p*c + λ*p*f
    a + b + c + d + e + f + g == 1
    # solver
    [a; b; c; d; e; f; g] := find(a, b, c, d, e, f, g) = [0.369004; 0.157826; 0.174277; 0.0793773; 0.0626663; 0.0691983; 0.0876511]
    A1 := b*μ + d*μ + e*μ
    A2 := c*μ + f*μ + g*μ
    A1 = 0.149935
    A2 = 0.165563
    Q1 := A1/(λ*p)
    Q2 := A2/(λ*(1 - p))
    Q1 = 0.832972
    Q2 = 0.613197
end solve block
